from pysdf import SDF
import os

import sys
sys.path.append(os.path.join(os.path.dirname(os.path.realpath(__file__)), "modules"))

# In this scene, we simulate a Talos humanoid robot with patches of cell sensors on its torso and arms.
# The position of the cells are extracted from an SDF file of the Talos robot.

def createScene(rootnode):
    import numpy as np
    from modules.header import addHeader, addSolvers
    from modules.robot import TalosHumanoidRobot
    from modules.patch import Patch
    from modules.ball import Ball
    from modules.cementbag import CementBag
    import Sofa.ImGui as MyGui
    from math import pi, sin
    from splib3.numerics import Quat
    from splib3.animation import AnimationManager, animate
    from modules.robotconfigurations import talos_ctrl_joint_infos_grasp as talosInitConfiguration

    settings, modelling, simulation = addHeader(rootnode, inverse=False, withCollision=True)

    addSolvers(simulation, rayleighStiffness=0)
    rootnode.VisualStyle.displayFlags = ["showVisual"]

    # Units are in m, kg, s
    # Robot
    simulation.addChild(TalosHumanoidRobot("data/talos.urdf"))
    robot = simulation.TalosHumanoidRobot.Robot

    # Direct problem
    names = robot.Joints.children
    positions = np.copy(robot.getMechanicalState().position.value)
    for i in range(len(positions)):
        jointName = names[i+1].name.value
        value = 0 if jointName not in talosInitConfiguration else talosInitConfiguration[jointName].pos_desired
        positions[i] = value
        joint = robot.addObject('JointConstraint', template='Vec1', name=jointName, index=i,
                                valueType="angle",
                                value=value
                                )
        MyGui.MyRobotWindow.addSetting(jointName, joint.value, -pi, pi)
    # Comment the JointConstraint and use a RestShapeSpringsForceField instead, to have springs on all joints instead of hard constraints
    # robot.addObject("RestShapeSpringsForceField", stiffness=1e1, angularStiffness=1e1, points=list(range(len(positions))))

    # This does not work I don't know why
    # Thus we have to hard code the initial configuration in the first call of URDFModelLoader
    robot.getMechanicalState().position.value = positions

    # Load the Talos robot model from an SDF file
    filePath = os.path.dirname(os.path.realpath(__file__))+"/data/talos.sdf"
    talos = SDF.from_file(filePath)

    # Read the cells position from the sdf file
    patchs = {}
    # There is only one model in the file
    for link in talos.model.links:
        # The cells position are in the visual part of the link
        for visual in link.visuals:
            if "cell" in visual.name:
                name = visual.name.split('_')

                # The joint name is the two or three first elements of the visual name
                jointName = "_".join(name[0:3]) if name[0] == "arm" else "_".join(name[0:2])
                if jointName not in patchs:
                    patchs[jointName] = {}

                # Add the cell position and orientation to the patch
                patch = patchs[jointName]
                cell = {
                    'position': visual.pose.position,
                    'orientation': visual.pose.orientation
                }
                patch["cell_" +name[-1]] = cell
                patchs[jointName] = patch

    # Hard coded positions
    patchOrigins = [[0.,     0.,     0.0722, 0.,     0.,     0.,     1.    ],
                    [0.00493, 0.294,   0.35093, 0.,      0.,      0.,      1.     ],
                    [0.00493, 0.294,   0.35093, 0.,      0.,      0.,      1.     ],
                    [0.02493, 0.294,   0.07273, 0.,      0.,      0.,      1.     ],
                    [0.00493,  0.294,   -0.19157,  0.,       0.,       0.,       1.     ],
                    [0.00493, -0.294,    0.35093,  0.,       0.,       0.,       1.     ],
                    [0.00493, -0.294,    0.35093,  0.,       0.,       0.,       1.     ],
                    [0.02493, -0.294,    0.07273,  0.,       0.,       0.,       1.     ],
                    [0.00493, -0.294,   -0.19157,  0.,       0.,       0.,       1.     ]]


    # Create the patches
    patchIndex = 0
    for patch in patchs:
        cellsPositions = []
        for cell in patchs[patch]:
            c = patchs[patch][cell]
            cellsPositions.append(list(c['position'] + c['orientation']))

        index = None
        for link in robot.Joints.children:
            if patch in link.name.value:
                index = link.jointMapping.index.value
                break

        if index is not None:
            Patch(simulationNode=simulation, attachNode=robot.Model,
                  attachIndex=index, name="Patch"+patch,
                  cellsPositions=cellsPositions,
                  origin=patchOrigins[patchIndex])
            patchIndex += 1


    CEMENTBAG = False
    if CEMENTBAG:
        # Cement bag
        # In this animation a cement bag is dropped on the robot arms
        simulation.EulerImplicitSolver.rayleighStiffness.value = 0.03
        rootnode.dt.value = 0.005
        rootnode.gravity.value = [0, 0, -9.81]
        robot.arm_right_5_joint.value = -1.58
        robot.arm_left_5_joint.value = 1.58
        bag = CementBag(simulation, position=[1, 0, 0.3]) # Add the bag to the simulation, place it in front of the robot
        bag.getMechanicalState().velocity.value = [[-5, 0, 0] for i in range(bag.getMechanicalState().size.value)] # Give an initial velocity to the bag to make it fall on the robot arms
    else:
        # Ball
        # In this animation a soft ball is squeezed by the robot arms
        ball = Ball(simulation, position=[0.25, 0, 0.3], color=[0.1, 0.1, 1, 0.3]) # Add the ball to the simulation, place it in front of the robot
        ball.addObject("VisualStyle", displayFlags=["showVisual", "showForceFields", "showWireframe"])

        # Animation of the arms to squeeze the ball
        rootnode.addObject(AnimationManager(rootnode))
        def animation(target, initialValue, factor, direction, startTime=0.):
            target.value = initialValue + sin(factor * pi) * 0.2 * direction

        animate(animation, {'target': robot.arm_right_3_joint.value,
                            'initialValue':robot.arm_right_3_joint.value.value,
                            'startTime':0.5,
                            'direction':1},
                            duration=1., mode='loop')
        animate(animation, {'target': robot.arm_left_3_joint.value,
                            'initialValue':robot.arm_left_3_joint.value.value,
                            'startTime':0.5,
                            'direction':-1},
                            duration=1., mode='loop')

    return
